*Heading
 Square with only dirichlet boundary conditions - quadrilateral element with moderate density
** Job name: sq_quad_mod_dirbc Model name: Model-1
** Generated by: Abaqus/CAE 6.13-4
*Preprint, echo=NO, model=NO, history=NO, contact=NO
**
** PARTS
**
*Part, name=sq_quad_mod_dirbc
*Node
      1,          0.5,          0.5
      2,  0.400000006,          0.5
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*Element, type=DC2D8
  1,   1,   2,  13,  12, 122, 123, 124, 125
  2,   2,   3,  14,  13, 126, 127, 128, 123
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*Nset, nset=Set-1, generate
   1,  341,    1
*Elset, elset=Set-1, generate
   1,  100,    1
** Section: Section-1
*Solid Section, elset=Set-1, material=Material-1
,
*End Part
**
**
** ASSEMBLY
**
*Assembly, name=Assembly
**
*Instance, name=sq_quad_mod_dirbc-1, part=sq_quad_mod_dirbc
*End Instance
**
*Nset, nset=Set-1, instance=sq_quad_mod_dirbc-1
  11,  22,  33,  44,  55,  66
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*Elset, elset=Set-1, instance=sq_quad_mod_dirbc-1, generate
  10,  100,   10
*Nset, nset=Set-2, instance=sq_quad_mod_dirbc-1
   1,  12,  23,  34,  45,  56
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*Elset, elset=Set-2, instance=sq_quad_mod_dirbc-1, generate
  1,  91,  10
*End Assembly
**
** MATERIALS
**
*Material, name=Material-1
*Conductivity
1.,
** ----------------------------------------------------------------
**
** STEP: Analysis
**
*Step, name=Analysis, nlgeom=NO
*Heat Transfer, steady state, deltmx=0.
1., 1., 1e-05, 1.,
**
** BOUNDARY CONDITIONS
**
** Name: BC-1 Type: Temperature
*Boundary
Set-1, 11, 11
** Name: BC-2 Type: Temperature
*Boundary
Set-2, 11, 11, 1.
**
** OUTPUT REQUESTS
**
*Restart, write, frequency=0
**
** FIELD OUTPUT: F-Output-1
**
*Output, field, variable=PRESELECT
*Output, history, frequency=0
*End Step
